# Berechnung der absoluten Feuchte
# Eingangsparameter / physikalische Größen
# Gaskonstante Wasserdampf
R_D := 461.51*J/(K*kg)
# Gaskonstante trockene Luft
R_tL := 287.058*J/(K*kg)
# Eingabeparameter / Messgrößen
# Umgebungsdruck
p_U := 101325*Pa
# Messgrößen
# Raumtemperatur
T_R := 20 °C
# relative Feuchte (in Prozent)
φ_R := 50%
φ_R = 0.5
# Berechnungen
# Dichte trockene Luft
ρ_tL := p_U/(R_tL*T_R) = 1.20408 kg/m^3
# Sättigungsdruck (Magnus-Formel)
E_R := 6.112*10^2 Pa*e^(17.62*(T_R - 273.15 K)/(243.12*K + (T_R - 273.15 K)))
# Partialdruck
e_R := φ_R*E_R = 1166.3 Pa
# absolute Feuchte
ρ_R := e_R/(R_D*T_R) = 8.62062 gm/m^3
# Gaskonstante feuchte Luft
R_tF := R_tL/(1 - (φ_R*E_R/p_U)*(1 - R_tL/R_D)) = 288.312 J/(kg*K)
# Dichte feuchte Luft
ρ_tL := p_U/(R_tF*T_R) = 1.19885 kg/m^3
# Vereinfachungen für die Berechnung auf Mikroprozessor
# Messgrößen
# Raumtemperatur in Grad Celsius
T_R := 20
# relative Feuchte (in Prozent)
φ_R := 50%
φ_R = 0.5
# absolute Feuchtigkeit in kg/Kubikmeter (Größengleichung)
ρ == φ_R*6.112*10^2 Pa*e^(17.62*(T_R - 273.15*K)/(243.12*K + (T_R - 273.15*K)))/(461.51*J/(K*kg)*T_R)
ρ := φ_R*1.32434833481*e^(17.62*T_R/(T_R + 243.12))/(T_R + 273.15) = 0.00862062
# absolute Feuchte in g/Kubikmeter (Größengleichung implementiert)
ρ := φ_R*1324.34*e^(17.62*T_R/(T_R + 243.15))/(T_R + 273.15) = 8.61925
# Berechnung der dynamischen Schaltschwelle
# Genauigkeit des AM2302 Sensors
# Temperatur: +/- 0.5 °C
# rel. Feuchte: +/- 2%
# Raumtemperatur in °C
T_R = 20  # Maximale Temperatur nehmen!
# maximaler Fehler der Luftfeuchtigkeit
Δφ_R := 5%
# Änderung der absoluten Feuchte in g/m³
# dynamische Schaltschwelle
# (implementiert)
Δρ_d := 1324.34*Δφ_R*e^(0.0696*T_R)/(T_R + 273.15) = 0.908694
# Berechnung der Taupunkttemperatur
# Taupunkt aus Magnus-Formel
τ(T_R, φ_R) == K_3*(K_2*T_R/(K_3 + T_R) + ln(φ_R))/(K_2*K_3/(K_3 + T_R) - ln(φ_R))
# vereinfacht
τ(T_R, φ_R) == -K_2*K_3*(T_R + K_3)/((T_R + K_3)*ln(φ_R) - K_2*K_3) - K_3
# Taupunkttemperatur in
# SI-Einheiten
K_3 := 243.12*K
K_2 := 17.62
τ(T_R, φ_R) := -K_2*K_3*((T_R - 273.15 K) + K_3)/(((T_R - 273.15 K) + K_3)*ln(φ_R) - K_2*K_3) + (273.15 K - K_3)
τ(T_R, φ_R) := (128641.73322*K^2 - 4283.774*T_R*K)/((T_R - 30.03*K)*ln(φ_R) - 4283.774 K) + 30.03 K
# Messgrößen (mit Einheiten)
T_R := 18.6 °C
φ_R := 0.6145
# Taupunkttemperatur
τ(T_R, φ_R) = 11.0387 °C
# Größengleichung (implementiert)
# Temperatur in °C
τ(T_R, φ_R) := -4283.77*(T_R + 243.12)/((T_R + 243.12)*ln(φ_R) - 4283.77) - 243.12
# Messgrößen (ohne Einheiten) in °C
T_R := 20
φ_R := 0.5
# Taupunkttemperatur
τ(T_R, φ_R) = 9.25516
ρ(T_R, φ_R) := φ_R*1324.34*e^(17.62*T_R/(T_R + 243.15))/(T_R + 273.15)
-4283.77*(T_R + 243.12)/((T_R + 243.12)*ln(φ_R) - 4283.77) = 252.375
ρ(20, 0.5) = 8.61925
ρ(10, 0.9) = 8.44321
τ(20, 0.5) = 9.25516
τ(10, 0.90) = 8.43394
